# ReaxFF potential for RDX system
# this run is equivalent to reax/in.reax.rdx
units		real
atom_style	charge
read_data	data.rdx
pair_style      reax/c control.reax_c.rdx
pair_coeff      * * ffield.reax_2013  C
group hot id        1       2       5       6       7       8       9      10      11      12      14     361     364     365     366     367     368     369     370     371     373     374     375     376     377     378     379     382     384     385     388     389     390     391     741     745     746     747     748     749     750     751     752     753     754     755     756     757     758     759     760     761     762    1129    1130    1133    1134    1137    1138   20142   20147   20148   20508   20511   20512   20513   20514   20515   20516   20517   20519   20520   20522   20525   20528   20530   20531   20532   20884   20885   20886   20887   20888   20889   20890   20891   20892   20893   20894   20895   20896   20897   20898   20899
group		rest subtract all hot
compute reax all pair reax/c
neighbor	2.5 bin
neigh_modify	every 10 delay 0 check no
velocity        hot create 10000.0 4928459 dist uniform #gaussian
fix             1 rest nve
fix             2 hot nvt temp 10000.0 10000.0 1.0
fix             3 all qeq/reax 1 0.0 10.0 1.0e-12 reax/c
compute 	myTemp1 rest temp
compute 	myTemp2 hot temp
thermo		10
thermo_style 	custom step temp epair etotal press vol c_myTemp1 c_myTemp2
timestep	0.1
fix             momen rest momentum 1 linear 1 1 1
dump 		3 all custom 10 trj id q mass x y z
dump        4 all custom 10 trjvel id mass vx vy vz
restart 	1000 x.restart
run		1000
